*HEADING
A-frame with torque applied at apex via force couple about vertical axis. Simulates twisting loads from lateral wind or cable tension. Tests torsion in symmetric branching topology.

*NODE, NSET=ALL_NODES
1, 0.000000, 0.000000, 0.000000
2, 0.000000, 0.000000, 100.000000
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
*ELEMENT, TYPE=C3D4, ELSET=ALL_ELEMENTS
1, 252, 805, 255, 895
2, 805, 849, 255, 895
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
*NSET, NSET=CONSTRAINT_1
1, 4, 6, 8, 36, 37
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
*MATERIAL, NAME=STRUCTURAL_STEEL
*ELASTIC
200000.000000, 0.300000

*SOLID SECTION, ELSET=ALL_ELEMENTS, MATERIAL=STRUCTURAL_STEEL

*BOUNDARY
CONSTRAINT_1, 1, 3

*STEP, NLGEOM=NO
*STATIC
0.1, 1.0

*NODE FILE
U, RF
*EL FILE
S, E

*END STEP
