*HEADING
A-frame with off-center apex load and unequal support widths. Left support base 30mm, right support base 70mm. Lateral load applied 15mm offset from apex. Tests asymmetry and selector precision on slender structures.

*NODE, NSET=ALL_NODES
1, 0.000000, 0.000000, 0.000000
2, 0.000000, 0.000000, 100.000000
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
*ELEMENT, TYPE=C3D4, ELSET=ALL_ELEMENTS
1, 252, 805, 255, 895
2, 805, 849, 255, 895
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
*NSET, NSET=CONSTRAINT_1
1, 8, 36, 37, 38, 96
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
*NSET, NSET=CONSTRAINT_2
4, 6, 42, 43, 44, 63
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
*NSET, NSET=LOAD_1
656

*MATERIAL, NAME=STRUCTURAL_STEEL
*ELASTIC
200000.000000, 0.300000

*SOLID SECTION, ELSET=ALL_ELEMENTS, MATERIAL=STRUCTURAL_STEEL

*BOUNDARY
CONSTRAINT_1, 1, 3

*BOUNDARY
CONSTRAINT_2, 1, 3

*STEP, NLGEOM=NO
*STATIC
0.1, 1.0

*CLOAD
LOAD_1, 2, 15000.000000

*NODE FILE
U, RF
*EL FILE
S, E

*END STEP
