*HEADING
100x10x10mm cantilever beam, fixed at left end, applied torque about z-axis via force couple at free end. Counter-clockwise rotation (ccw) — opposite sense from beam_cantilever_torque_couple_z for sign convention testing.

*NODE, NSET=ALL_NODES
1, 0.000000, -5.000000, -5.000000
2, 0.000000, -5.000000, 5.000000
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
*ELEMENT, TYPE=C3D4, ELSET=ALL_ELEMENTS
1, 273, 1181, 1140, 1339
2, 575, 1150, 1262, 1326
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
*NSET, NSET=CONSTRAINT_1
1, 2, 7, 8, 9, 10
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
*MATERIAL, NAME=STRUCTURAL_STEEL
*ELASTIC
200000.000000, 0.300000

*SOLID SECTION, ELSET=ALL_ELEMENTS, MATERIAL=STRUCTURAL_STEEL

*BOUNDARY
CONSTRAINT_1, 1, 3

*STEP, NLGEOM=NO
*STATIC
0.1, 1.0

*NODE FILE
U, RF
*EL FILE
S, E

*END STEP
