*HEADING
Bridge span with full fixed left support and expansion bearing at right (x free, representing thermal expansion joint). Combined gravity self-weight and deck traffic load.

*NODE, NSET=ALL_NODES
1, 0.000000, 0.000000, 0.000000
2, 0.000000, 0.000000, 30.000000
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
*ELEMENT, TYPE=C3D4, ELSET=ALL_ELEMENTS
1, 303, 937, 979, 1124
2, 317, 995, 614, 1234
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
*NSET, NSET=CONSTRAINT_1
1, 8, 47, 140, 145, 146, 147, 148, 649, 653, 718, 749, 750

*NSET, NSET=CONSTRAINT_2
4, 6, 70, 82, 83, 84, 85, 117, 650, 720, 721, 748, 751

*NSET, NSET=DLOAD_2
886, 939, 962, 1036, 1051, 1107, 1121

*MATERIAL, NAME=STRUCTURAL_STEEL
*ELASTIC
200000.000000, 0.300000

*SOLID SECTION, ELSET=ALL_ELEMENTS, MATERIAL=STRUCTURAL_STEEL

*BOUNDARY
CONSTRAINT_1, 1, 3

*BOUNDARY
CONSTRAINT_2, 1, 3

*STEP, NLGEOM=NO
*STATIC
0.1, 1.0

*CLOAD
DLOAD_2, 3, -20000.000000

*DLOAD
ALL_ELEMENTS, GRAV, 9810, 0, 0, -1

*NODE FILE
U, RF
*EL FILE
S, E

*END STEP
