*HEADING
Tall column with a pinned base (y and z fixed, x free — slides horizontally). Top lateral wind load. Classic Euler-column scenario with lateral sway freedom at base.

*NODE, NSET=ALL_NODES
1, 0.000000, 0.000000, 0.000000
2, 0.000000, 0.000000, 200.000000
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
*ELEMENT, TYPE=C3D4, ELSET=ALL_ELEMENTS
1, 230, 1016, 948, 1091
2, 217, 973, 1005, 1024
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
*NSET, NSET=CONSTRAINT_1
1, 4, 6, 8, 70, 71
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
*NSET, NSET=DLOAD_1
2, 3, 5, 7, 37, 38
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
*MATERIAL, NAME=STRUCTURAL_STEEL
*ELASTIC
200000.000000, 0.300000

*SOLID SECTION, ELSET=ALL_ELEMENTS, MATERIAL=STRUCTURAL_STEEL

*BOUNDARY
CONSTRAINT_1, 1, 3

*STEP, NLGEOM=NO
*STATIC
0.1, 1.0

*CLOAD
DLOAD_1, 1, 5000.000000

*NODE FILE
U, RF
*EL FILE
S, E

*END STEP
