*HEADING
Tall slender steel column under self-weight gravity only. Base fully fixed. Self-weight causes axial compression with a gradient, rewarding lighter upper sections in topology optimization.

*NODE, NSET=ALL_NODES
1, 0.000000, 0.000000, 0.000000
2, 0.000000, 0.000000, 200.000000
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
*ELEMENT, TYPE=C3D4, ELSET=ALL_ELEMENTS
1, 1006, 1121, 1038, 1301
2, 1038, 1129, 1006, 1301
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
*NSET, NSET=CONSTRAINT_1
1, 4, 6, 8, 82, 83
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
*MATERIAL, NAME=STRUCTURAL_STEEL
*ELASTIC
200000.000000, 0.300000

*SOLID SECTION, ELSET=ALL_ELEMENTS, MATERIAL=STRUCTURAL_STEEL

*BOUNDARY
CONSTRAINT_1, 1, 3

*STEP, NLGEOM=NO
*STATIC
0.1, 1.0

*DLOAD
ALL_ELEMENTS, GRAV, 9810, 0, 0, -1

*NODE FILE
U, RF
*EL FILE
S, E

*END STEP
