*HEADING
J-shaped crane hook under self-weight gravity only. Fixed at shank. Tests stress distribution from body force in the complex curved STEP geometry without an external lifted load.

*NODE, NSET=ALL_NODES
1, -23.076900, -23.076900, 0.000000
2, -23.076900, -23.076900, 7.692300
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
*ELEMENT, TYPE=C3D4, ELSET=ALL_ELEMENTS
1, 233, 2267, 2029, 2506
2, 1308, 2008, 1905, 2066
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
*NSET, NSET=CONSTRAINT_1
7, 8, 124, 125, 126, 127
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
*MATERIAL, NAME=STRUCTURAL_STEEL
*ELASTIC
200000.000000, 0.300000

*SOLID SECTION, ELSET=ALL_ELEMENTS, MATERIAL=STRUCTURAL_STEEL

*BOUNDARY
CONSTRAINT_1, 1, 3

*STEP, NLGEOM=NO
*STATIC
0.1, 1.0

*DLOAD
ALL_ELEMENTS, GRAV, 9810, 0, -1, 0

*NODE FILE
U, RF
*EL FILE
S, E

*END STEP
