*HEADING
Single-hole bracket STEP geometry where the wall mount is a lateral roller (x+z fixed, y free — can slide along the bracket depth). Bolt hole loaded downward. Tests topology under a non-fully-fixed wall condition.

*NODE, NSET=ALL_NODES
1, 0.000000, 0.000000, 0.000000
2, 0.000000, 0.000000, 24.242399
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
*ELEMENT, TYPE=C3D4, ELSET=ALL_ELEMENTS
1, 879, 928, 827, 1046
2, 894, 1045, 275, 1074
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
*NSET, NSET=CONSTRAINT_1
1, 2, 7, 8, 9, 10
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
*NSET, NSET=DLOAD_1
643, 644, 645, 646, 647, 648
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
*MATERIAL, NAME=STRUCTURAL_STEEL
*ELASTIC
200000.000000, 0.300000

*SOLID SECTION, ELSET=ALL_ELEMENTS, MATERIAL=STRUCTURAL_STEEL

*BOUNDARY
CONSTRAINT_1, 1, 3

*STEP, NLGEOM=NO
*STATIC
0.1, 1.0

*CLOAD
DLOAD_1, 3, -5000.000000

*NODE FILE
U, RF
*EL FILE
S, E

*END STEP
