*HEADING
Cylindrical cantilever beam (axis along y). Left end fully fixed, right end has a vertical roller (z free, x+y locked). Distributed downward load at mid-span. Roller relieves vertical reaction at far end.

*NODE, NSET=ALL_NODES
1, 20.000000, 0.000000, 0.000000
2, 20.000000, 100.000000, 0.000000
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
*ELEMENT, TYPE=C3D4, ELSET=ALL_ELEMENTS
1, 647, 681, 334, 715
2, 306, 771, 702, 775
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
*NSET, NSET=CONSTRAINT_1
1, 3, 4, 5, 6, 7
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
*NSET, NSET=CONSTRAINT_2
2, 42, 43, 44, 45, 46
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
*NSET, NSET=DLOAD_1
271, 272, 406, 416, 423, 448, 449

*MATERIAL, NAME=STRUCTURAL_STEEL
*ELASTIC
200000.000000, 0.300000

*SOLID SECTION, ELSET=ALL_ELEMENTS, MATERIAL=STRUCTURAL_STEEL

*BOUNDARY
CONSTRAINT_1, 1, 3

*BOUNDARY
CONSTRAINT_2, 1, 3

*STEP, NLGEOM=NO
*STATIC
0.1, 1.0

*CLOAD
DLOAD_1, 3, -5000.000000

*NODE FILE
U, RF
*EL FILE
S, E

*END STEP
