*HEADING
Solid cylinder domain fixed at base with an eccentric point load at the top (off-center, near the rim). Combines axial compression with bending due to load eccentricity. Non-trivial stress gradient drives asymmetric topology.

*NODE, NSET=ALL_NODES
1, 30.000000, 0.000000, 0.000000
2, 30.000000, 0.000000, 100.000000
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
*ELEMENT, TYPE=C3D4, ELSET=ALL_ELEMENTS
1, 610, 695, 607, 835
2, 461, 638, 511, 655
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
*NSET, NSET=CONSTRAINT_1
1, 3, 4, 5, 6, 7
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
*NSET, NSET=LOAD_1
515

*MATERIAL, NAME=STRUCTURAL_STEEL
*ELASTIC
200000.000000, 0.300000

*SOLID SECTION, ELSET=ALL_ELEMENTS, MATERIAL=STRUCTURAL_STEEL

*BOUNDARY
CONSTRAINT_1, 1, 3

*STEP, NLGEOM=NO
*STATIC
0.1, 1.0

*CLOAD
LOAD_1, 3, -8000.000000

*NODE FILE
U, RF
*EL FILE
S, E

*END STEP
