*HEADING
Cylindrical mast domain fixed at base, under combined gravity self-weight and lateral wind distributed force. Tests topology under biaxial loading on a non-box domain.

*NODE, NSET=ALL_NODES
1, 20.000000, 0.000000, 0.000000
2, 20.000000, 0.000000, 150.000000
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
*ELEMENT, TYPE=C3D4, ELSET=ALL_ELEMENTS
1, 454, 713, 365, 839
2, 136, 135, 137, 672
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
*NSET, NSET=CONSTRAINT_1
1, 3, 4, 5, 6, 7
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
*NSET, NSET=DLOAD_2
6, 7, 8, 48, 49, 50
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
*MATERIAL, NAME=STRUCTURAL_STEEL
*ELASTIC
200000.000000, 0.300000

*SOLID SECTION, ELSET=ALL_ELEMENTS, MATERIAL=STRUCTURAL_STEEL

*BOUNDARY
CONSTRAINT_1, 1, 3

*STEP, NLGEOM=NO
*STATIC
0.1, 1.0

*CLOAD
DLOAD_2, 2, -4000.000000

*DLOAD
ALL_ELEMENTS, GRAV, 9810, 0, 0, -1

*NODE FILE
U, RF
*EL FILE
S, E

*END STEP
