*HEADING
Portal frame with partial side pressure patch instead of full face. Pressure applied only to upper 40mm of 100mm height. Tests localized pressure selector and non-uniform load distribution.

*NODE, NSET=ALL_NODES
1, 0.000000, 0.000000, 0.000000
2, 0.000000, 0.000000, 100.000000
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
*ELEMENT, TYPE=C3D4, ELSET=ALL_ELEMENTS
1, 1872, 2231, 2168, 2498
2, 1256, 2293, 2132, 2461
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
*NSET, NSET=CONSTRAINT_1
1, 3, 5, 7, 8, 12
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
*NSET, NSET=DLOAD_1
4, 11, 15, 16, 89, 90
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
*MATERIAL, NAME=STRUCTURAL_STEEL
*ELASTIC
200000.000000, 0.300000

*SOLID SECTION, ELSET=ALL_ELEMENTS, MATERIAL=STRUCTURAL_STEEL

*BOUNDARY
CONSTRAINT_1, 1, 3

*STEP, NLGEOM=NO
*STATIC
0.1, 1.0

*CLOAD
DLOAD_1, 2, -30000.000000

*NODE FILE
U, RF
*EL FILE
S, E

*END STEP
