*HEADING
Portal frame STEP geometry with split base constraints: left base fully fixed, right base is a lateral roller (x free, y+z fixed). Lateral wind pressure applied to front face. Sliding base allows horizontal thermal expansion while resisting uplift.

*NODE, NSET=ALL_NODES
1, 0.000000, 0.000000, 0.000000
2, 0.000000, 0.000000, 100.000000
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
*ELEMENT, TYPE=C3D4, ELSET=ALL_ELEMENTS
1, 2451, 4306, 4115, 5086
2, 2102, 4577, 4297, 4810
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
*NSET, NSET=CONSTRAINT_1
1, 8, 126, 127, 128, 129
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
*NSET, NSET=CONSTRAINT_2
4, 6, 149, 150, 151, 152
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
*NSET, NSET=DLOAD_1
5, 6, 7, 8, 157, 158
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
*MATERIAL, NAME=STRUCTURAL_STEEL
*ELASTIC
200000.000000, 0.300000

*SOLID SECTION, ELSET=ALL_ELEMENTS, MATERIAL=STRUCTURAL_STEEL

*BOUNDARY
CONSTRAINT_1, 1, 3

*BOUNDARY
CONSTRAINT_2, 1, 3

*STEP, NLGEOM=NO
*STATIC
0.1, 1.0

*CLOAD
DLOAD_1, 2, -20000.000000

*NODE FILE
U, RF
*EL FILE
S, E

*END STEP
