*HEADING
Gravity Dam / Retaining Wall with hydrostatic pressure varying linearly with depth.

*NODE, NSET=ALL_NODES
1, 0.000000, 0.000000, 0.000000
2, 0.000000, 0.000000, 100.000000
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
*ELEMENT, TYPE=C3D4, ELSET=ALL_ELEMENTS
1, 275, 921, 819, 943
2, 324, 871, 288, 1064
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
*NSET, NSET=CONSTRAINT_1
1, 4, 6, 8, 41, 42
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
*MATERIAL, NAME=ALUMINUM_6061_T6
*ELASTIC
68900.000000, 0.330000

*SOLID SECTION, ELSET=ALL_ELEMENTS, MATERIAL=ALUMINUM_6061_T6

*BOUNDARY
CONSTRAINT_1, 1, 3

*STEP, NLGEOM=NO
*STATIC
0.1, 1.0

*NODE FILE
U, RF
*EL FILE
S, E

*END STEP
