*HEADING
Heavy duty L-bracket connecting a vertical wall to a horizontal load point.

*NODE, NSET=ALL_NODES
1, 0.000000, 0.000000, 0.000000
2, 0.000000, 0.000000, 100.000000
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
*ELEMENT, TYPE=C3D4, ELSET=ALL_ELEMENTS
1, 877, 1034, 744, 1123
2, 961, 1204, 328, 1269
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
*NSET, NSET=CONSTRAINT_1
1, 2, 7, 8, 9, 10
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
*NSET, NSET=LOAD_1
306

*MATERIAL, NAME=ALUMINUM_6061_T6
*ELASTIC
68900.000000, 0.330000

*SOLID SECTION, ELSET=ALL_ELEMENTS, MATERIAL=ALUMINUM_6061_T6

*BOUNDARY
CONSTRAINT_1, 1, 3

*STEP, NLGEOM=NO
*STATIC
0.1, 1.0

*CLOAD
LOAD_1, 3, -5000.000000

*NODE FILE
U, RF
*EL FILE
S, E

*END STEP
