*HEADING
L-bracket with actual L-shaped design domain (not bounding box). This forces the optimizer to work within the L-shape constraint.

*NODE, NSET=ALL_NODES
1, 0.000000, 0.000000, 0.000000
2, 0.000000, 0.000000, 30.000000
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
*ELEMENT, TYPE=C3D4, ELSET=ALL_ELEMENTS
1, 300, 799, 816, 851
2, 639, 797, 838, 921
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
*NSET, NSET=CONSTRAINT_1
1, 2, 6, 7, 10, 13
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
*NSET, NSET=LOAD_1
272

*MATERIAL, NAME=ALUMINUM_6061_T6
*ELASTIC
68900.000000, 0.330000

*SOLID SECTION, ELSET=ALL_ELEMENTS, MATERIAL=ALUMINUM_6061_T6

*BOUNDARY
CONSTRAINT_1, 1, 3

*STEP, NLGEOM=NO
*STATIC
0.1, 1.0

*CLOAD
LOAD_1, 3, -3000.000000

*NODE FILE
U, RF
*EL FILE
S, E

*END STEP
