*HEADING
Aluminium L-bracket wall-mounted with gravity self-weight plus a downward tip force. Complex L-shaped domain tests optimizer under combined self-weight and service load.

*NODE, NSET=ALL_NODES
1, 0.000000, 0.000000, 0.000000
2, 0.000000, 0.000000, 30.000000
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
*ELEMENT, TYPE=C3D4, ELSET=ALL_ELEMENTS
1, 300, 799, 816, 851
2, 639, 797, 838, 921
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
*NSET, NSET=CONSTRAINT_1
1, 2, 6, 7, 10, 13
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
*NSET, NSET=LOAD_2
880

*MATERIAL, NAME=ALUMINUM_6061_T6
*ELASTIC
68900.000000, 0.330000

*SOLID SECTION, ELSET=ALL_ELEMENTS, MATERIAL=ALUMINUM_6061_T6

*BOUNDARY
CONSTRAINT_1, 1, 3

*STEP, NLGEOM=NO
*STATIC
0.1, 1.0

*CLOAD
LOAD_2, 3, -2000.000000

*DLOAD
ALL_ELEMENTS, GRAV, 9810, 0, 0, -1

*NODE FILE
U, RF
*EL FILE
S, E

*END STEP
