*HEADING
Vertical mast with torque applied at top (antenna twisting). Simulates rotational wind/vibration loads on communication towers. Tests torsional stiffness and stress in slender cantilevers.

*NODE, NSET=ALL_NODES
1, -5.000000, -5.000000, 0.000000
2, -5.000000, -5.000000, 100.000000
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
*ELEMENT, TYPE=C3D4, ELSET=ALL_ELEMENTS
1, 1201, 1275, 1142, 1364
2, 939, 1174, 344, 1227
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
*NSET, NSET=CONSTRAINT_1
1, 4, 6, 8, 101, 102
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
*MATERIAL, NAME=STRUCTURAL_STEEL
*ELASTIC
200000.000000, 0.300000

*SOLID SECTION, ELSET=ALL_ELEMENTS, MATERIAL=STRUCTURAL_STEEL

*BOUNDARY
CONSTRAINT_1, 1, 3

*STEP, NLGEOM=NO
*STATIC
0.1, 1.0

*NODE FILE
U, RF
*EL FILE
S, E

*END STEP
