*HEADING
Vertical mast with combined top-mounted loads: point load (axial) and side distributed load. Simulates antenna with wind + gravity. Tests multi-axis loading on slender cantilever.

*NODE, NSET=ALL_NODES
1, -5.000000, -5.000000, 0.000000
2, -5.000000, -5.000000, 100.000000
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
*ELEMENT, TYPE=C3D4, ELSET=ALL_ELEMENTS
1, 1201, 1275, 1142, 1364
2, 939, 1174, 344, 1227
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
*NSET, NSET=CONSTRAINT_1
1, 4, 6, 8, 101, 102
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
*NSET, NSET=DLOAD_1
2, 3, 5, 7, 53, 54
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
*NSET, NSET=DLOAD_2
2, 3, 5, 7, 53, 54
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
*MATERIAL, NAME=STRUCTURAL_STEEL
*ELASTIC
200000.000000, 0.300000

*SOLID SECTION, ELSET=ALL_ELEMENTS, MATERIAL=STRUCTURAL_STEEL

*BOUNDARY
CONSTRAINT_1, 1, 3

*STEP, NLGEOM=NO
*STATIC
0.1, 1.0

*CLOAD
DLOAD_1, 1, 2000.000000

*CLOAD
DLOAD_2, 3, -5000.000000

*NODE FILE
U, RF
*EL FILE
S, E

*END STEP
