*HEADING
Flat plate with all four lateral edges constrained only in z (guided: x and y free, z locked). Top face axial compression. Models a plate under buckling-precursor conditions where edges can slide in-plane.

*NODE, NSET=ALL_NODES
1, 0.000000, 0.000000, 0.000000
2, 0.000000, 0.000000, 15.000000
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
*ELEMENT, TYPE=C3D4, ELSET=ALL_ELEMENTS
1, 1180, 1432, 1417, 1572
2, 413, 349, 1419, 1708
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
*NSET, NSET=CONSTRAINT_1
1, 2, 7, 8, 9, 10
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
*NSET, NSET=CONSTRAINT_2
3, 4, 5, 6, 30, 31
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
*NSET, NSET=CONSTRAINT_3
1, 2, 3, 4, 9, 10
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
*NSET, NSET=CONSTRAINT_4
5, 6, 7, 8, 70, 71
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
*NSET, NSET=DLOAD_1
2, 3, 5, 7, 11, 12
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
*MATERIAL, NAME=STRUCTURAL_STEEL
*ELASTIC
200000.000000, 0.300000

*SOLID SECTION, ELSET=ALL_ELEMENTS, MATERIAL=STRUCTURAL_STEEL

*BOUNDARY
CONSTRAINT_1, 1, 3

*BOUNDARY
CONSTRAINT_2, 1, 3

*BOUNDARY
CONSTRAINT_3, 1, 3

*BOUNDARY
CONSTRAINT_4, 1, 3

*STEP, NLGEOM=NO
*STATIC
0.1, 1.0

*CLOAD
DLOAD_1, 3, -30000.000000

*NODE FILE
U, RF
*EL FILE
S, E

*END STEP
