*HEADING
Box beam with one face fully fixed and the far face as a lateral roller (y free, x+z fixed). Vertical distributed load on top. The roller allows axial elongation at the free end.

*NODE, NSET=ALL_NODES
1, 0.000000, 0.000000, 0.000000
2, 0.000000, 0.000000, 30.000000
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
*ELEMENT, TYPE=C3D4, ELSET=ALL_ELEMENTS
1, 303, 937, 979, 1124
2, 317, 995, 614, 1234
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
*NSET, NSET=CONSTRAINT_1
1, 2, 7, 8, 9, 10
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
*NSET, NSET=CONSTRAINT_2
3, 4, 5, 6, 40, 41
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
*NSET, NSET=DLOAD_1
72, 73, 142, 143, 773, 774
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
*MATERIAL, NAME=STRUCTURAL_STEEL
*ELASTIC
200000.000000, 0.300000

*SOLID SECTION, ELSET=ALL_ELEMENTS, MATERIAL=STRUCTURAL_STEEL

*BOUNDARY
CONSTRAINT_1, 1, 3

*BOUNDARY
CONSTRAINT_2, 1, 3

*STEP, NLGEOM=NO
*STATIC
0.1, 1.0

*CLOAD
DLOAD_1, 3, -12000.000000

*NODE FILE
U, RF
*EL FILE
S, E

*END STEP
