*HEADING
CSG portal frame (two columns + top beam) with both bases fully fixed. Combined gravity self-weight and lateral wind on the right column face. Tests topology under body force + surface pressure on complex multi-member geometry.

*NODE, NSET=ALL_NODES
1, 0.000000, 0.000000, 75.000000
2, 10.000000, 0.000000, 75.000000
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
*ELEMENT, TYPE=C3D4, ELSET=ALL_ELEMENTS
1, 648, 1100, 1248, 1251
2, 797, 1098, 971, 1246
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
*NSET, NSET=CONSTRAINT_1
5, 6, 14, 15, 24, 25
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
*NSET, NSET=DLOAD_2
9, 18, 19, 26, 27, 28
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
*MATERIAL, NAME=STRUCTURAL_STEEL
*ELASTIC
200000.000000, 0.300000

*SOLID SECTION, ELSET=ALL_ELEMENTS, MATERIAL=STRUCTURAL_STEEL

*BOUNDARY
CONSTRAINT_1, 1, 3

*STEP, NLGEOM=NO
*STATIC
0.1, 1.0

*CLOAD
DLOAD_2, 1, -6000.000000

*DLOAD
ALL_ELEMENTS, GRAV, 9810, 0, 0, -1

*NODE FILE
U, RF
*EL FILE
S, E

*END STEP
