*HEADING
Simply supported beam with left pin (all DOF fixed) and right roller (x free, y+z fixed). Midspan point load. Tests asymmetric end-support topology.

*NODE, NSET=ALL_NODES
1, 0.000000, 0.000000, 0.000000
2, 0.000000, 0.000000, 20.000000
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
*ELEMENT, TYPE=C3D4, ELSET=ALL_ELEMENTS
1, 412, 1037, 939, 1114
2, 835, 1077, 1006, 1186
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
*NSET, NSET=CONSTRAINT_1
1, 8, 50, 162, 168, 169, 170, 171, 172, 584, 673, 727, 728, 729, 731, 734

*NSET, NSET=CONSTRAINT_2
4, 6, 80, 91, 92, 93, 94, 95, 132, 585, 599, 719, 726, 732, 733, 735

*NSET, NSET=LOAD_1
799

*MATERIAL, NAME=STRUCTURAL_STEEL
*ELASTIC
200000.000000, 0.300000

*SOLID SECTION, ELSET=ALL_ELEMENTS, MATERIAL=STRUCTURAL_STEEL

*BOUNDARY
CONSTRAINT_1, 1, 3

*BOUNDARY
CONSTRAINT_2, 1, 3

*STEP, NLGEOM=NO
*STATIC
0.1, 1.0

*CLOAD
LOAD_1, 3, -10000.000000

*NODE FILE
U, RF
*EL FILE
S, E

*END STEP
