*HEADING
T-beam with left end pinned (all DOF) and right end roller (x free, y+z fixed). Distributed load on top cap. T-shape domain with asymmetric end conditions.

*NODE, NSET=ALL_NODES
1, 0.000000, 0.000000, 24.000000
2, 0.000000, 0.000000, 30.000000
3, 60.000000, 0.000000, 30.000000
4, 60.000000, 0.000000, 24.000000
5, 36.000000, 0.000000, 24.000000
6, 24.000000, 0.000000, 24.000000
7, 0.000000, 100.000000, 24.000000
8, 0.000000, 100.000000, 30.000000
9, 60.000000, 100.000000, 30.000000
10, 60.000000, 100.000000, 24.000000
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
*ELEMENT, TYPE=C3D4, ELSET=ALL_ELEMENTS
1, 473, 870, 476, 871
2, 687, 882, 873, 890
3, 155, 110, 857, 872
4, 471, 476, 473, 870
5, 740, 873, 817, 896
6, 740, 817, 877, 896
7, 765, 873, 882, 890
8, 121, 120, 473, 870
9, 110, 155, 546, 872
10, 120, 471, 473, 870
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
*NSET, NSET=CONSTRAINT_1
5, 6, 12, 13, 33, 34, 130, 131, 132, 133, 134, 135, 136, 137, 138, 139
340, 341, 342, 343, 344, 345, 346, 347, 348, 349, 350, 351

*NSET, NSET=CONSTRAINT_2
11, 14, 15, 16, 171, 172, 173, 174, 175, 176, 194, 195, 196, 197, 215, 216
844, 845, 846, 847, 848, 849, 850, 851, 852, 853, 854, 855

*NSET, NSET=DLOAD_1
48, 82, 432, 434, 464, 465, 466, 512, 513, 514, 518, 573, 574, 575, 581, 582
598, 599, 604, 630, 631

*MATERIAL, NAME=STRUCTURAL_STEEL
*ELASTIC
200000.000000, 0.300000

*SOLID SECTION, ELSET=ALL_ELEMENTS, MATERIAL=STRUCTURAL_STEEL

*BOUNDARY
CONSTRAINT_1, 1, 3

*BOUNDARY
CONSTRAINT_2, 1, 3

*STEP, NLGEOM=NO
*STATIC
0.1, 1.0

*CLOAD
DLOAD_1, 3, -10000.000000

*NODE FILE
U, RF
*EL FILE
S, E

*END STEP
