*HEADING
T-beam on roller supports with self-weight gravity only. Left end pinned, right end roller (x free). Self-weight dominates over concentrated loading.

*NODE, NSET=ALL_NODES
1, 0.000000, 0.000000, 24.000000
2, 0.000000, 0.000000, 30.000000
3, 60.000000, 0.000000, 30.000000
4, 60.000000, 0.000000, 24.000000
5, 36.000000, 0.000000, 24.000000
6, 24.000000, 0.000000, 24.000000
7, 0.000000, 150.000000, 24.000000
8, 0.000000, 150.000000, 30.000000
9, 60.000000, 150.000000, 30.000000
10, 60.000000, 150.000000, 24.000000
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
*ELEMENT, TYPE=C3D4, ELSET=ALL_ELEMENTS
1, 769, 857, 709, 858
2, 823, 721, 845, 848
3, 169, 736, 124, 865
4, 677, 816, 703, 785
5, 787, 851, 704, 863
6, 169, 168, 124, 736
7, 677, 785, 786, 853
8, 819, 816, 677, 785
9, 163, 481, 482, 858
10, 700, 704, 851, 863
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
*NSET, NSET=CONSTRAINT_1
5, 6, 12, 13, 28, 145, 146, 147, 148, 149, 150, 151, 357, 358, 359, 360
361, 362

*NSET, NSET=CONSTRAINT_2
11, 14, 15, 16, 185, 186, 187, 188, 211, 212, 213, 236, 832, 833, 834, 835
836, 837

*MATERIAL, NAME=STRUCTURAL_STEEL
*ELASTIC
200000.000000, 0.300000

*SOLID SECTION, ELSET=ALL_ELEMENTS, MATERIAL=STRUCTURAL_STEEL

*BOUNDARY
CONSTRAINT_1, 1, 3

*BOUNDARY
CONSTRAINT_2, 1, 3

*STEP, NLGEOM=NO
*STATIC
0.1, 1.0

*DLOAD
ALL_ELEMENTS, GRAV, 9810, 0, 0, -1

*NODE FILE
U, RF
*EL FILE
S, E

*END STEP
