*HEADING
T-shaped domain as a cantilever beam: one full face fixed (y=0), opposite end loaded downward. The T cross-section provides efficient moment of inertia for cantilever bending.

*NODE, NSET=ALL_NODES
1, 0.000000, 0.000000, 24.000000
2, 0.000000, 0.000000, 30.000000
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
*ELEMENT, TYPE=C3D4, ELSET=ALL_ELEMENTS
1, 749, 762, 858, 874
2, 678, 852, 851, 871
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
*NSET, NSET=CONSTRAINT_1
1, 2, 3, 4, 5, 6
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
*NSET, NSET=DLOAD_1
7, 8, 9, 10, 11, 14
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
*MATERIAL, NAME=STRUCTURAL_STEEL
*ELASTIC
200000.000000, 0.300000

*SOLID SECTION, ELSET=ALL_ELEMENTS, MATERIAL=STRUCTURAL_STEEL

*BOUNDARY
CONSTRAINT_1, 1, 3

*STEP, NLGEOM=NO
*STATIC
0.1, 1.0

*CLOAD
DLOAD_1, 3, -8000.000000

*NODE FILE
U, RF
*EL FILE
S, E

*END STEP
